####################################################
# Preprocessing Li2SO4 in water
#################### SETTING UP ####################
units real
dimension 3
newton on
boundary p p p
atom_style full

#################### VARIABLES ####################
variable Temp equal T_VALUE    # Temperature in K
variable Pres equal P_VALUE    # Pressure in atm.

variable RandomSeed equal R_VALUE # The random seed for velocity
variable tstep equal dt_VALUE # timestep in fs

#################### NPT ####################
variable Ninptpre equal Nrun_eq_VALUE # Pre-initialize the NPT ensemble (very small timesteps)
variable Ninpt equal Nrun4_VALUE  # Initialize the NPT ensemble
variable Npnpt equal Nrun4_VALUE  # Production in the NPT ensemble (volume)

#################### NVT ####################
variable Ninvtpre equal Nrun_eq_VALUE  # Pre-initialize the NVT ensemble (very small timesteps)
variable Ninvt equal Nrun3_VALUE   # Initialize the NVT ensemble 2.5Mstep
variable Nrun1 equal Nrun1_VALUE  # production in the NVT ensemble (Transport properties)
variable Nrun2 equal Nrun2_VALUE  # production in the NVT ensemble (Transport properties)
variable Nrun3 equal Nrun3_VALUE  # production in the NVT ensemble (Transport properties)
variable Nrun4 equal Nrun4_VALUE  # production in the NVT ensemble (Transport properties)

variable Nf equal 100000      # Nfreq (fix ave/time and thermo)
variable Ne equal  1          # Nevery (fix ave/time)
variable Nr equal ${Nf}/${Ne} # Nrepeat (fix ave/time)
variable Nd equal ${Nf} 	  # Frequency of outputting positions of atoms in the NVT ensemble
variable NBR equal ${Npnpt}/100 # Block averaging for density (NPT)

variable nb equal 10          # Number of blocks (fix ordern)
variable nbe equal 20         # Number of block elements (fix ordern)
variable Nvisc equal 5        # Nevery for viscosity (fix ordern: sample data at (Nvisc*2))
variable Ncond equal 5        # Nevery for Tconductivity (fix ordern: sample data at (Ncond*2))
variable Ndiff equal 1000     # Nevery for diffusivity (fix ordern: sample data at (Ndiff))
variable Nwrit equal 100000   # Nwrite for transport properties (fix ordern: write every (Nwrit))

variable Nrdfe equal 1000     # Nevery for RDF (fix ave/time)
variable Nrdfw equal 1000     # Nwrite for RDF (compute rdf/ext: write every (Nrdfw*Nrdfe))
variable binnum equal 2000    # Number of bins for RDF

#################### ATOM DEFINITION and FORCEFIELD ####################
read_data ./data.lmp                     # read the positions
include ./forcefield.data                # read the force field

#################### INITIALIZATION ####################
group wat type 1		# O water
group Li type 3			# Potasium ion
group Cl type 4			# Chlorine ion

# neigbor lists
neighbor 2.0 bin
neigh_modify every 1 delay 0 check yes

# velocity-Verlet integrator
run_style verlet


# minimizing the system using the conjugate gradient method
min_style cg
min_modify dmax 0.05
minimize 1.0e-6 1.0e-6 1000 10000
reset_timestep 0


# initializing velocities
velocity all create ${Temp} ${RandomSeed}

# rate of writing thermal properties to the log file
thermo_style custom step density temp press etotal
thermo_modify flush yes
thermo ${Nf}

#################### 2) Initialize the NPT ensemble ####################
######### Go to the correct temperature now ant initiate that ##########
fix constrain all shake 1.0e-6 1000 0 b 1 a 1
fix integrate all npt temp ${Temp} ${Temp} 10.0 iso ${Pres} ${Pres} 100.0


# Initializing the whole system with very small timesteps in the NPT ensemble
timestep 0.001
run ${Ninptpre}
timestep 0.01
run ${Ninptpre}
timestep 0.1
run ${Ninptpre}
timestep 0.2
run ${Ninptpre}
timestep 0.5
run ${Ninptpre}
reset_timestep 0

# continuing the initialization with the final value of timestep
unfix integrate
fix integrate all npt temp ${Temp} ${Temp} 100.0 iso ${Pres} ${Pres} 1000.0

timestep ${tstep}


run ${Ninpt}
reset_timestep 0


#################### 3) Obtaining average volume in NPT ######################
# Creating restart files
restart ${Nf} 1.restart 2.restart

# Getting the average volume of the system
variable Volume equal vol
fix VoluAve all ave/time 1 ${Npnpt} ${Npnpt} v_Volume file volume.dat

variable Dens equal density
fix DensAve all ave/time 1 ${NBR} ${NBR} v_Dens file density.dat

compute T1 all temp
fix TempAve1 all ave/time 1 ${NBR} ${NBR} c_T1 file temperatureNPT.dat

compute P1 all pressure T1
fix PressAve1 all ave/time 1 ${NBR} ${NBR} c_P1 file pressureNPT.dat

run ${Npnpt}

#################### 4) Initializing the NVT ensemble ####################
# scaling the size of the system to the average volume
variable sidesize equal (f_VoluAve^(1.0/3.0))    # get the volume
variable xlow equal xlo
variable ylow equal ylo
variable zlow equal zlo
variable xhig equal (xlo+${sidesize})
variable yhig equal (ylo+${sidesize})
variable zhig equal (zlo+${sidesize})
change_box all x final ${xlow} ${xhig} y final ${ylow} ${yhig} z final ${zlow} ${zhig}
unfix DensAve
unfix VoluAve
unfix TempAve1
unfix PressAve1

# changing the ensemble to NVT
unfix integrate
fix integrate all nvt temp ${Temp} ${Temp} 10.0

timestep 0.001
run ${Ninvtpre}
timestep 0.01
run ${Ninvtpre}
timestep 0.1
run ${Ninvtpre}
timestep 0.2
run ${Ninvtpre}
timestep 0.5
run ${Ninvtpre}

unfix integrate
fix integrate all nvt temp ${Temp} ${Temp} 100.0
# continuing the initialization with the final value of timestep
timestep ${tstep}

run ${Ninvt}

reset_timestep 0

#################### 2) Production in NVT ensemble #####################
# computing average total energy, pontential energy, temperature, and pressure over time
variable TotEn equal etotal
fix TEAve all ave/time ${Ne} ${Nr} ${Nf} v_TotEn file TotalE.dat

variable PotEn equal pe
fix PEAve all ave/time ${Ne} ${Nr} ${Nf} v_PotEn file PotenE.dat

compute T all temp
fix TempAve all ave/time ${Ne} ${Nr} ${Nf} c_T file temperature.dat

compute P all pressure T
fix PressAve all ave/time ${Ne} ${Nr} ${Nf} c_P file pressure.dat


# computing self-diffusion and Onsager coefficients using the OCTP plugin
compute positions all position
fix f1 all ordern diffusivity ${Ndiff} ${Nwrit} c_positions nb ${nb} nbe ${nbe}


# computing shear and bulk viscosities  using the OCTP plugin
fix f2 all ordern viscosity ${Nvisc} ${Nwrit} c_P nb ${nb} nbe ${nbe}


# computing thermal conductivity using the OCTP plugin
compute KE all ke/atom
compute PE all pe/atom
compute ST all stress/atom NULL virial
compute heatflux all heat/flux KE PE ST
fix f3 all ordern thermalconductivity ${Ncond} ${Nwrit} c_heatflux nb ${nb} nbe ${nbe}


# computing the RDF for all group pairs
compute rdfs all rdf/ext Nbin ${binnum} Nwrite ${Nrdfw}
fix f4 all ave/time 1 1 ${Nrdfe} c_rdfs

dump trjectory all xyz ${Nd} movie.xyz
dump_modify trjectory element Ow H K Cl

run ${Nrun1}
shell bash copy_files.sh dt_${tstep} 00.25Mstep

run ${Nrun1}
shell bash copy_files.sh dt_${tstep} 00.50Mstep

run ${Nrun1}
shell bash copy_files.sh dt_${tstep} 00.75Mstep

run ${Nrun1}
shell bash copy_files.sh dt_${tstep} 01.00Mstep

run ${Nrun1}
shell bash copy_files.sh dt_${tstep} 01.25Mstep

run ${Nrun1}
shell bash copy_files.sh dt_${tstep} 01.50Mstep

run ${Nrun1}
shell bash copy_files.sh dt_${tstep} 01.75Mstep

run ${Nrun1}
shell bash copy_files.sh dt_${tstep} 02.00step

run ${Nrun2}
shell bash copy_files.sh dt_${tstep} 03.00Mstep

run ${Nrun2}
shell bash copy_files.sh dt_${tstep} 04.00Mstep

run ${Nrun2}
shell bash copy_files.sh dt_${tstep} 05.00Mstep

run ${Nrun2}
shell bash copy_files.sh dt_${tstep} 06.00Mstep

run ${Nrun2}
shell bash copy_files.sh dt_${tstep} 07.00Mstep

run ${Nrun2}
shell bash copy_files.sh dt_${tstep} 08.00Mstep

run ${Nrun2}
shell bash copy_files.sh dt_${tstep} 09.00Mstep

run ${Nrun2}
shell bash copy_files.sh dt_${tstep} 10.00Mstep

run ${Nrun3}
shell bash copy_files.sh dt_${tstep} 12.50Mstep

run ${Nrun3}
shell bash copy_files.sh dt_${tstep} 15.00Mstep

run ${Nrun3}
shell bash copy_files.sh dt_${tstep} 17.50Mstep

run ${Nrun3}
shell bash copy_files.sh dt_${tstep} 20.00Mstep

run ${Nrun4}
shell bash copy_files.sh dt_${tstep} 25.00Mstep

run ${Nrun4}
shell bash copy_files.sh dt_${tstep} 30.00Mstep

run ${Nrun4}
shell bash copy_files.sh dt_${tstep} 35.00Mstep

run ${Nrun4}
shell bash copy_files.sh dt_${tstep} 40.00Mstep

run ${Nrun4}
shell bash copy_files.sh dt_${tstep} 45.00Mstep

run ${Nrun4}
shell bash copy_files.sh dt_${tstep} 50.00Mstep
quit
